Simulations Yuxi's toolbox
  Folder DataAssimilation
    OpenLoop
    DirectInsertion
    EnKF
  Control: DAOption=OpenLoop; EnsembleSize=50; AddModelError=false; FixPhenology=false; EnsembleInflator=1.8; DaSPheno=[130, 131, 135, 136, 201, 246, 254, 287, 289, 290, 0]
    OpenLoop
    InitialConditions: InitialDate=1996-01-01; InitialSW=[0.25, 0.25, 0.25, 0.25, 0.25, 0.25, 0.25]; InitialSWError=[0.11, 0.1, 0.09, 0.08, 0.07, 0.07, 0.07]
    StateVariables: ModelError=[0, 0, 0, 0, 0, 0, 0, 0, 0, 0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]; ModelErrorOption=[0, 0, 0, 0, 0, 0, 0, 0, 0, 0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]
      StateNames=[LAI, SW1, SW2, SW3, SW4, SW5, SW6, SW7, LeafWt, StemWt, GrainWt, PodWt, RootWt, LeafN, StemN, GrainN, PodN, RootN, Height, RootDepth, SoilNO3_1, SoilNO3_2, SoilNO3_3, SoilNO3_4, SoilNO3_5, SoilNO3_6, SoilNO3_7, SoilNH4_1, SoilNH4_2, SoilNH4_3, SoilNH4_4, SoilNH4_5, SoilNH4_6, SoilNH4_7]
    Observations
      ObsNames=[LAI, SW1, SW2, SW3, SW4, SW5, SW6, SW7, LeafWt, StemWt, LeafN, StemN, PodN, SoilNO3_1, SoilNO3_2, SoilNO3_3, SoilNO3_4, SoilNO3_5, SoilNO3_6, SoilNO3_7, SoilNH4_1, SoilNH4_2, SoilNH4_3, SoilNH4_4, SoilNH4_5, SoilNH4_6, SoilNH4_7, Biomass, SoilNTotal_1, SoilNTotal_2]
      ObsError=[0.4, 0.03, 0.03, 0.03, 0.03, 0.03, 0.03, 0.03, 0.05, 0.05, 0.05, 0.05, 0.05, 0.05, 0.05, 0.05, 0.05, 0.05, 0.05, 0.05, 0.05, 0.05, 0.05, 0.05, 0.05, 0.05, 0.05, 0.05, 0.05, 0.05]
      ObsErrorOption=[0, 0, 0, 0, 0, 0, 0, 0, 1, 1, 1, 1, 1, 1, 1, 1, 1, 1, 1, 1, 1, 1, 1, 1, 1, 1, 1, 1, 1, 1]
  Folder Sensitivity analysis: WeatherSens={WeatherInput=[rain], Offset=[0.1], OffsetOption=[1]}; ThermalTimeSens={DoTTSens=true, TTOffset=50, Date=1996-06-01}; CultivarSens=[[[Phenology].Vernalisation.VernSens = 3.0]]
    StateSens={StateNames=[LAI], Offset=[0.1], OffsetOption=[1], Date=1996-06-01}
    SoilTemperatureSens={StateNames=[ST1], Offset=[1], OffsetOption=[0], Date=1996-06-01}
    BiomassSens={Organs=[LAI], States=[Wt], Offset=[0.2], OffsetOption=[1], AllocationRule=0, Date=1996-06-01}
    LeafNodeSens={NodeOffset=1, LeavePerNodeOffset=[-1, -1, -1, -1, -1, 0, 0, 0, 0, 0, 0, 0, 0, 0, 0, 0, 0, 0, 0, 0, 0, 0, 0, 0, 0, 0, 0, 0, 0, 0], Date=1996-06-01}
  Folder Yuxi's scripts
    Manager Example
      Value = 0
```csharp
        using System;
using Models.Core;
using System.Collections.Generic;
using System.Text;
using Models.Soils;
using Models.PMF;
using Models;
using System.Xml.Serialization;
using APSIM.Shared.Utilities;

namespace Models
{
	[Serializable] 
	public class Script : Model
	{
		[Description("Insert value here")]
		public double Value { get; set; }
    
		[EventSubscribe("DoManagement")]
		private void OnDoManagement(object sender, EventArgs e)
		{
        Value=0;
		}

	}
}
```
